*HEADING
 single screw metering channel (unrolled 2.5D, generic notation) D=40mm N=1/s G=1e5 Pa/m
*NODE
 1, 0.0, 0.0, 0.0
 2, 0.0008905920628358133, 0.0, 0.0
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*ELEMENT, TYPE=C3D8, ELSET=CHANNEL
 1, 1, 2, 75, 74, 2410, 2411, 2484, 2483
 2, 2, 3, 76, 75, 2411, 2412, 2485, 2484
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*ELSET, ELSET=EXMIN
 1, 61, 121, 181, 241, 301
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*ELSET, ELSET=EXMAX
 60, 120, 180, 240, 300, 360
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*ELSET, ELSET=EBARREL
 1945, 1946, 1947, 1948, 1949, 1950
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*SURFACE, NAME=XPER0
 EXMIN, S6
*SURFACE, NAME=XPER1
 EXMAX, S4
*SURFACE, NAME=ZPER0
 CHANNEL, S1
*SURFACE, NAME=ZPER1
 CHANNEL, S2
*SURFACE, NAME=BARREL
 EBARREL, S5
*BOUNDARY, TYPE=PERIODIC
 XPER0, XPER1, 0.038115620559547495, 0.0, 0.0
*BOUNDARY, TYPE=PERIODIC
 ZPER0, ZPER1, 0.0, 0.0, 0.0004
*MATERIAL, NAME=MELT
*DENSITY
 1000.0
*VISCOSITY
 1000.0
*FLUID SECTION, ELSET=CHANNEL, MATERIAL=MELT
*STEP, NAME=channel
*NAVIER STOKES, STEADY STATE, HEAT TRANSFER=NONE
*CONTROLS, PARAMETERS=DISCRETIZATION
 CONVECTION=NONE, PRESSURE_VELOCITY=COUPLED
*CONTROLS, PARAMETERS=RELAXATION
 VISCOSITY=0.5
*CONTROLS, PARAMETERS=SOLVER
 TOL=1e-09, MAX_OUTER=200
*BOUNDARY, TYPE=VELOCITY
 BARREL, -0.038115620559547495, 0.0, 0.1197437535368905
*DLOAD
 CHANNEL, BF, -314159.26535897935, 0.0, -100000.0
*OUTPUT, FIELD, FORMAT=NPZ+VTK
*END STEP
